*Heading
** Job name: Middle_dense Model name: Middle_pressure2-Copy
** Generated by: Abaqus/CAE 2022
*Preprint, echo=NO, model=NO, history=NO, contact=NO
**
** PARTS
**
*Part, name=Part-1
*Node
      1,        -31.5,           0.,          60.
      2,         -1.5,           0.,          60.
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*Element, type=C3D8I
 1,  8, 35, 83, 43,  1, 17, 73, 30
 2, 35, 34, 84, 83, 17, 18, 74, 73
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*Element, type=C3D8
 37,  188,  369,  140,  317,  611,  981,  329,  115
 38,  611,  981,  329,  115,  612,  982,  330,  116
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*Nset, nset=Pads, generate
   1,  112,    1
*Elset, elset=Pads, generate
  1,  36,   1
*Nset, nset=sCBM_section
     1,     2,     3,     4,     9,    10
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*Elset, elset=sCBM_section, generate
   37,  8088,     1
** Section: Section-2
*Solid Section, elset=Pads, material=Pad
,
** Section: Section-3
*Solid Section, elset=sCBM_section, material=Material-middle
,
*End Part
**
**
** ASSEMBLY
**
*Assembly, name=Assembly
**
*Instance, name=Part-1-1, part=Part-1
*End Instance
**
*Node
      1, -1.42108547e-14,         120.,          30.
*Nset, nset=bottom, instance=Part-1-1
 151, 152, 161, 162, 214, 215, 217, 218, 307, 308, 309, 310, 322, 323, 325, 326
*Elset, elset=bottom, instance=Part-1-1
 460, 461, 462, 475, 476, 477
*Nset, nset=load, instance=Part-1-1
 5815, 5816, 5817, 5818, 5819, 5820
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*Elset, elset=load, instance=Part-1-1
 1256, 1303, 1318, 1367, 1383, 1384
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*Nset, nset=midpoint, instance=Part-1-1
 6054, 6055, 6128, 6137
*Elset, elset=midpoint, instance=Part-1-1, generate
 1384,  6176,  2396
*Nset, nset=rp
 1,
*Elset, elset=_Surf-1_S5, internal, instance=Part-1-1, generate
 19,  36,   1
*Elset, elset=_Surf-1_S1, internal, instance=Part-1-1, generate
  1,  18,   1
*Surface, type=ELEMENT, name=Surf-1
_Surf-1_S5, S5
_Surf-1_S1, S1
** Constraint: Constraint-1
*Equation
2
load, 2, -1.
rp, 2, 1.
*End Assembly
*Amplitude, name=ALoad
             0.,              0.,             0.8,              1.
*Amplitude, name=Amp-1
             0.,              0.,              1.,              1.
**
** MATERIALS
**
*Material, name=Material-1
*Density
 2.4e-09,
*Elastic
38300., 0.18
*Material, name=Material-middle
*Density
 2.4e-09,
*Elastic
38300., 0.18
*Material, name=Pad
*Density
 2.4e-09,
*Elastic
500., 0.18
*Plastic
25.,0.
** ----------------------------------------------------------------
**
** STEP: Step-1
**
*Step, name=Step-1, nlgeom=NO, inc=10000
*Static
1e-05, 1., 1e-16, 1.
**
** BOUNDARY CONDITIONS
**
** Name: BC-2 Type: Displacement/Rotation
*Boundary
midpoint, 1, 1
midpoint, 3, 3
** Name: BC-3 Type: Displacement/Rotation
*Boundary, amplitude=Amp-1
rp, 2, 2
**
** LOADS
**
** Name: Load-1   Type: Pressure
*Dsload, amplitude=ALoad
Surf-1, P, 10.
**
** OUTPUT REQUESTS
**
*Restart, write, frequency=0
**
** FIELD OUTPUT: F-Output-1
**
*Output, field
*Node Output
CF, RF, U
*Element Output, directions=YES
LE, P, PE, PEEQ, PEMAG, S
*Contact Output
CDISP, CSTRESS
**
** HISTORY OUTPUT: H-Output-1
**
*Output, history, variable=PRESELECT
*End Step
** ----------------------------------------------------------------
**
** STEP: Step-2
**
*Step, name=Step-2, nlgeom=NO, inc=10000
*Static
0.01, 1., 1e-05, 1.
**
** BOUNDARY CONDITIONS
**
** Name: BC-1 Type: Displacement/Rotation
*Boundary
bottom, 2, 2, 5.
**
** OUTPUT REQUESTS
**
*Restart, write, frequency=0
**
** FIELD OUTPUT: F-Output-1
**
*Output, field
*Node Output
CF, RF, U
*Element Output, directions=YES
LE, P, PE, PEEQ, PEMAG, S
*Contact Output
CDISP, CSTRESS
**
** HISTORY OUTPUT: H-Output-1
**
*Output, history, variable=PRESELECT
*End Step
