*Heading
** Job name: Small_elastic Model name: Small
** Generated by: Abaqus/CAE 2022
*Preprint, echo=NO, model=NO, history=NO, contact=NO
**
** PARTS
**
*Part, name=Part-1
*End Part
**
**
** ASSEMBLY
**
*Assembly, name=Assembly
**
*Instance, name=Part-1-1, part=Part-1
*Node
      1,         -15.,           0.,           0.
      2,         -1.5,           0.,           0.
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*Element, type=C3D8I
 1,  55,   1,   4,  62, 395,  74,  71, 403
 2,  56,  55,  62,  61, 396, 395, 403, 404
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*Element, type=C3D8
  31, 2731, 2509, 2508, 2585,  427,  122,   17,  103
  32, 2732, 2731, 2585, 2586,  428,  427,  103,  104
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*Nset, nset=whole, generate
    1,  4756,     1
*Elset, elset=whole, generate
    1,  3426,     1
*Nset, nset=pads
   1,   2,   3,   4,   5,   6
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*Elset, elset=pads, generate
  1,  30,   1
*Nset, nset=concrete
    1,    2,    5,    8,    9,   12
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*Elset, elset=concrete, generate
   31,  3426,     1
** Section: elastic
*Solid Section, elset=pads, material=elastic
,
** Section: Section-1
*Solid Section, elset=concrete, material=concrete
,
*End Instance
**
*Node
      1, -1.42108547e-14,          60.,          30.
*Nset, nset=bottom, instance=Part-1-1
  19,  20,  26,  27,  44,  45,  53,  54, 306, 307, 308, 309, 328, 329, 330, 331
*Elset, elset=bottom, instance=Part-1-1
   66,  103, 1198, 1235, 2330, 2367
*Nset, nset=load, instance=Part-1-1
   35,   36,   37,   48,   49,   50
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*Elset, elset=load, instance=Part-1-1
  151,  176,  191,  231, 1283, 1308, 1323, 1363, 2415, 2440, 2455, 2495
*Nset, nset=midpoint, instance=Part-1-1
  36,  49, 320, 321
*Elset, elset=midpoint, instance=Part-1-1, generate
  231,  2495,  1132
*Nset, nset=rp
 1,
*Elset, elset=_Surf-1_S4, internal, instance=Part-1-1, generate
 16,  30,   1
*Elset, elset=_Surf-1_S5, internal, instance=Part-1-1, generate
  1,  15,   1
*Surface, type=ELEMENT, name=Surf-1
_Surf-1_S4, S4
_Surf-1_S5, S5
** Constraint: Constraint-1
*Equation
2
load, 2, -1.
rp, 2, 1.
*End Assembly
*Amplitude, name=Amp-1
             0.,              0.,              1.,              1.
*Amplitude, name=Amp-2
             0.,              0.,             0.8,              1.
**
** MATERIALS
**
*Material, name=concrete
*Density
 2.4e-09,
*Elastic
38300., 0.18
*Material, name=elastic
*Density
 2.4e-09,
*Elastic
1000., 0.18
** ----------------------------------------------------------------
**
** STEP: Step-1
**
*Step, name=Step-1, nlgeom=NO, inc=10000
*Static
1e-05, 1., 1e-16, 1.
**
** BOUNDARY CONDITIONS
**
** Name: BC-2 Type: Displacement/Rotation
*Boundary
midpoint, 1, 1
midpoint, 3, 3
** Name: BC-3 Type: Displacement/Rotation
*Boundary, amplitude=Amp-1
rp, 2, 2
**
** LOADS
**
** Name: Load-1   Type: Pressure
*Dsload, amplitude=Amp-2
Surf-1, P, 10.
**
** OUTPUT REQUESTS
**
*Restart, write, frequency=0
**
** FIELD OUTPUT: F-Output-1
**
*Output, field, variable=PRESELECT
**
** HISTORY OUTPUT: H-Output-1
**
*Output, history, variable=PRESELECT
*End Step
** ----------------------------------------------------------------
**
** STEP: Step-2
**
*Step, name=Step-2, nlgeom=NO
*Static
1., 1., 1e-05, 1.
**
** BOUNDARY CONDITIONS
**
** Name: BC-1 Type: Displacement/Rotation
*Boundary
bottom, 2, 2
** Name: BC-3 Type: Displacement/Rotation
*Boundary, amplitude=Amp-1
rp, 2, 2, -5.
**
** OUTPUT REQUESTS
**
*Restart, write, frequency=0
**
** FIELD OUTPUT: F-Output-1
**
*Output, field, variable=PRESELECT
**
** HISTORY OUTPUT: H-Output-1
**
*Output, history, variable=PRESELECT
*End Step
